*Heading
** Job name: Job-2 Model name: Base_mixed_radius
** Generated by: Abaqus/CAE 6.14-1
*Preprint, echo=NO, model=NO, history=NO, contact=NO
**
** PARTS
**
*Part, name=PART-1
*Node
      1, -0.0250000004, 0.00499999989,           0.
      2, -0.0250000004, 0.00353553006, 0.00353553006
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*Element, type=STRI65
1,  17,  56,  24, 377, 378, 379
2,  43,  63,  56, 382, 383, 381
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*Element, type=S8R
 7,  38,  37,  98,  91,  49, 145, 146, 143
 8,  37,  36, 105,  98,  48, 147, 148, 145
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*Nset, nset=LEFTFIXED, generate
  1,  16,   1
*Elset, elset=EALL, generate
   1,  144,    1
*Elset, elset=SOLID, generate
   1,  144,    1
*Elset, elset=_PICKEDSET8, internal, generate
   1,  144,    1
*Nset, nset=NALL
   1,   2,   3,   4,   5,   6
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*Nset, nset=RIGHTFIXED
  17,  18,  19,  20,  21,  22,  23,  24, 379, 399, 414, 429, 444, 459, 474, 488
*Nset, nset=TOP
   1,  17,  33,  34,  35,  36
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** Section: ShellSection
*Shell Section, elset=_PICKEDSET8, material=MATERIAL, offset=-0.5
0.001, 5
*End Part
**
**
** ASSEMBLY
**
*Assembly, name=Assembly
**
*Instance, name=PART-1-1, part=PART-1
*End Instance
**
*Elset, elset=EALL, instance=PART-1-1, generate
  1,  96,   1
*Nset, nset=LEFTFIXED, instance=PART-1-1, generate
  1,  16,   1
*Nset, nset=NALL, instance=PART-1-1
   1,   2,   3,   4,   5,   6
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*Nset, nset=RIGHTFIXED, instance=PART-1-1
  17,  18,  19,  20,  21,  22,  23,  24, 379, 399, 414, 429, 444, 459, 474, 488
*Elset, elset=SOLID, instance=PART-1-1, generate
  1,  144,   1
*Nset, nset=TOP, instance=PART-1-1
   1,  17,  33,  34,  35,  36
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*Nset, nset=WALLOUTSIDE, instance=PART-1-1
   1,   2,   3,   4,   5,   6
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*Elset, elset=_MOVINGSURFACE0_SNEG, internal, instance=PART-1-1, generate
   1,  144,    1
*Surface, type=ELEMENT, name=MOVINGSURFACE0
_MOVINGSURFACE0_SNEG, SNEG
*End Assembly
**
** MATERIALS
**
*Material, name=MATERIAL
*Density
1200.,
*Elastic
300000., 0.3
**
** BOUNDARY CONDITIONS
**
** Name: Disp-BC-1 Type: Displacement/Rotation
*Boundary
LEFTFIXED, 1, 1
** Name: Disp-BC-2 Type: Displacement/Rotation
*Boundary
LEFTFIXED, 2, 2
** Name: Disp-BC-3 Type: Displacement/Rotation
*Boundary
LEFTFIXED, 3, 3
** Name: Disp-BC-4 Type: Displacement/Rotation
*Boundary
RIGHTFIXED, 1, 1
** Name: Disp-BC-5 Type: Displacement/Rotation
*Boundary
RIGHTFIXED, 2, 2
** Name: Disp-BC-6 Type: Displacement/Rotation
*Boundary
RIGHTFIXED, 3, 3
** ----------------------------------------------------------------
**
** STEP: Step-1
**
*Step, name=Step-1, nlgeom=YES, inc=1
*Dynamic,application=QUASI-STATIC,direct,nohaf,initial=NO
0.0001,0.0001,
**
** LOADS
**
** Name: SURFFORCE-1   Type: Pressure
*Dsload, op=NEW
MOVINGSURFACE0, PNU, 1.
** Name: SurfaceTraction-1   Type: Surface traction
*Dsload, op=NEW
MOVINGSURFACE0, TRVECNU, 1., 1., 0., 0.
**
** OUTPUT REQUESTS
**
*Restart, write, overlay, frequency=99999
**
** FIELD OUTPUT: F-Output-1
**
*Output, field, frequency=99999
*Node Output, nset=WALLOUTSIDE
COORD, U
**
** FIELD OUTPUT: F-Output-2
**
*Output, field, variable=PRESELECT, frequency=99999
**
** HISTORY OUTPUT: H-Output-1
**
*Output, history, variable=PRESELECT, frequency=99999
*End Step
