*Heading
 turek
** Job name: case_turek Model name: Model-1
** Generated by: Abaqus/CAE 2024
*Preprint, echo=NO, model=NO, history=NO, contact=NO
**
** PARTS
**
*Part, name=PART-1
*Node
      1,  0.248989999,  0.189999998
      2,  0.248989999,  0.209999993
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*Element, type=CPE4R
   1,  253,  265,  123,    3
   2,  265,  276,  122,  123
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*Nset, nset=NALL, generate
    1,  1573,     1
*Nset, nset=BEAMINSIDEMOVING0
   2,   4, 124, 125, 126, 127
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*Nset, nset=BEAMINSIDEMOVING1
   3,   4, 243, 244, 245, 246, 247, 248, 249, 250, 251, 252, 253
*Nset, nset=BEAMINSIDEMOVING2
   1,   3,   5,   6,   7,   8
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*Nset, nset=BEAMINSIDEFIXED
   1,   2, 254, 255, 256, 257, 258, 259, 260, 261, 262, 263, 264
*Elset, elset=EALL, generate
    1,  1440,     1
*Elset, elset=BEAM, generate
    1,  1440,     1
*Elset, elset=_PickedSet9, internal, generate
    1,  1440,     1
** Section: BeamSection
*Solid Section, elset=_PickedSet9, material=Material
1.,
*End Part
**
**
** ASSEMBLY
**
*Assembly, name=Assembly
**
*Instance, name=PART-1-1, part=PART-1
*End Instance
**
*Elset, elset=BEAM, instance=PART-1-1, generate
    1,  1440,     1
*Nset, nset=BEAMINSIDEFIXED, instance=PART-1-1
   1,   2, 254, 255, 256, 257, 258, 259, 260, 261, 262, 263, 264
*Nset, nset=BEAMINSIDEMOVING2, instance=PART-1-1
   1,   3,   5,   6,   7,   8
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*Nset, nset=BEAMINSIDEMOVING1, instance=PART-1-1
   3,   4, 243, 244, 245, 246, 247, 248, 249, 250, 251, 252, 253
*Nset, nset=BEAMINSIDEMOVING0, instance=PART-1-1
   2,   4, 124, 125, 126, 127
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*Elset, elset=EALL, instance=PART-1-1, generate
    1,  1440,     1
*Nset, nset=NALL, instance=PART-1-1, generate
    1,  1573,     1
*Elset, elset=_BEAMINSIDEMOVING2_S3, internal, instance=PART-1-1, generate
   1,  120,    1
*Surface, type=ELEMENT, name=BEAMINSIDEMOVING2
_BEAMINSIDEMOVING2_S3, S3
*Elset, elset=_BEAMINSIDEMOVING1_S4, internal, instance=PART-1-1, generate
    1,  1321,   120
*Surface, type=ELEMENT, name=BEAMINSIDEMOVING1
_BEAMINSIDEMOVING1_S4, S4
*Elset, elset=_BEAMINSIDEMOVING0_S1, internal, instance=PART-1-1, generate
 1321,  1440,     1
*Surface, type=ELEMENT, name=BEAMINSIDEMOVING0
_BEAMINSIDEMOVING0_S1, S1
*End Assembly
**
** MATERIALS
**
*Material, name=Material
*Density
10000.,
*Elastic
 1.4e+06, 0.4
** ----------------------------------------------------------------
**
** STEP: Step-1
**
*Step, name=Step-1, nlgeom=YES, amplitude=RAMP, inc=99
*Dynamic,application=MODERATE DISSIPATION,direct,nohaf
0.002,0.002,
**
** BOUNDARY CONDITIONS
**
** Name: FixedLeftEnd Type: Displacement/Rotation
*Boundary
BEAMINSIDEFIXED, 1, 1
BEAMINSIDEFIXED, 2, 2
**
** OUTPUT REQUESTS
**
*Restart, write, number interval=100
**
** FIELD OUTPUT: F-Output-1
**
*Output, field, frequency=1
*Node Output
COORD, U
*Element Output, directions=YES
COORD, TRVEC
**
** FIELD OUTPUT: F-Output-2
**
*Output, field, variable=PRESELECT, frequency=1
**
** HISTORY OUTPUT: H-Output-1
**
*Output, history, variable=PRESELECT, frequency=1
*End Step
