*Heading
 Yarn
** Job name: Yarn Model name: Model-1
** Generated by: Abaqus/CAE 2024
*Preprint, echo=NO, model=NO, history=NO, contact=NO
**
** PARTS
**
*Part, name=YARN
*Node
      1, -0.230000004, 0.0601999983,           0.
      2, -0.229893997, 0.0601669997, -0.00199700007
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*Element, type=B32
	1,	1,	991,	2,	1980
	2,	2,	992,	3,	1981
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*Nset, nset=CL_NODES, generate
    1,  1979,     1
*Elset, elset=ALL_ELEMENTS, generate
   1,  989,    1
*Nset, nset=START_NODE
 1,
*Elset, elset=_Surf-1_, internal, generate
   1,  989,    1
*Surface, type=ELEMENT, name=Surf-1
_Surf-1_,
** Section: YARN Profile: CYLINDER
*BEAM GENERAL SECTION, ELSET=ALL_ELEMENTS, DENSITY=291.5924, POISSON=0.15, SECTION=NONLINEAR GENERAL
9.8768e-08, 7.7629e-16, 0, 7.7629e-16, 1.5526e-15
1.,0.,0.
*AXIAL, ELASTIC
-1.413701696814115216e+01, -5.000000000000000000e-01
0.000000000000000000e+00, 0.000000000000000000e+00
4.467514726862619745e-01, 1.580076877933479784e-02
8.921465596463883374e-01, 2.816319393288714210e-02
1.280015522599952993e+00, 4.552179247396198614e-02
1.602227679847883168e+00, 7.033166881150834659e-02
1.752080563535051816e+00, 1.015392390708750731e-01
1.874238696432554585e+00, 1.378332289690958612e-01
3.093217835147239470e+00, 5.000000000000000000e-01
*M1, LINEAR
1.908e-09
*M2, LINEAR
1.908e-09
*TORQUE, LINEAR
1.950e-07
*End Part
**
*Part, name=NOZZLE
*End Part
**
**
** ASSEMBLY
**
*Assembly, name=Assembly
**
*Instance, name=INSTANCE-YARN, part=YARN
*End Instance
**
*Instance, name=INSTANCE-NOZZLE, part=NOZZLE
          0.,           0.,           0.
          0.,           0.,           0.,           0.,           0.,          -1.,          90.
*Node
      1,           0.,           0.,           0.
*Nset, nset=INSTANCE-NOZZLE-RefPt_, internal
1,
*Surface, type=REVOLUTION, name=RIGID
START,      0.04064,      -0.0352
 CIRCL, 0.00064,       0.0048,      0.04064,       0.0048
 LINE,      0.00064,       0.0352
 LINE,      0.00088,      0.04045
 LINE,       0.0013,  0.283102382
*Rigid Body, ref node=INSTANCE-NOZZLE-RefPt_, analytical surface=RIGID
*End Instance
**
*Elset, elset=ALL_ELEMENTS, instance=INSTANCE-YARN, generate
   1,  989,    1
*Nset, nset=CL_NODES, instance=INSTANCE-YARN, generate
    1,  1979,     1
*Nset, nset=START_NODE, instance=INSTANCE-YARN
 1,
*Nset, nset=Set-8, instance=INSTANCE-NOZZLE
 1,
*End Assembly
**
** INTERACTION PROPERTIES
**
*Surface Interaction, name=IntProp-1
1.,
*Friction, slip tolerance=0.005
0.,
*Surface Behavior, pressure-overclosure=HARD
**
** INTERACTIONS
**
** Interaction: Int-1
*Contact Pair, interaction=IntProp-1
INSTANCE-YARN.Surf-1, INSTANCE-NOZZLE.RIGID
** ----------------------------------------------------------------
**
** STEP: Step-1
**
*Step, name=Step-1, nlgeom=YES, amplitude=STEP, inc=10005
*Dynamic,application=QUASI-STATIC,nohaf,initial=NO
5e-06,5e-06,5e-11,5e-06
*Solution Technique, type=QUASI-NEWTON
**
** BOUNDARY CONDITIONS
**
** Name: BC-1 Type: Displacement/Rotation
*Boundary
INSTANCE-YARN.START_NODE, 1, 1
INSTANCE-YARN.START_NODE, 2, 2
INSTANCE-YARN.START_NODE, 3, 3
**
** Name: BC-2 Type: Symmetry/Antisymmetry/Encastre
*Boundary
Set-8, ENCASTRE
**
** LOADS
**
** Name: Load-1   Type: Line load
*Dload
INSTANCE-YARN.ALL_ELEMENTS, PXNU, 1.
INSTANCE-YARN.ALL_ELEMENTS, PYNU, 1.
INSTANCE-YARN.ALL_ELEMENTS, PZNU, 1.
**
** Name: Gravity  Type: Gravity
*Dload
INSTANCE-YARN.ALL_ELEMENTS, GRAV, 9.81, 0, -1, 0
**
** OUTPUT REQUESTS
**
*Restart, write, overlay, frequency=99999
**
** FIELD OUTPUT: F-Output-1
**
*Output, field, frequency=99999
*Node Output, nset=INSTANCE-YARN.CL_NODES
COORD, U
**
** FIELD OUTPUT: F-Output-2
**
*Output, field, variable=PRESELECT, frequency=99999
*Element Output, elset=INSTANCE-YARN.ALL_ELEMENTS, directions=YES, variable=PRESELECT
SF, SE, SM, ESF1, COORD
**
** HISTORY OUTPUT: H-Output-1
**
*Output, history, variable=PRESELECT, frequency=99999
*End Step
