*Heading
** Job name: wireDeform Model name: Model-1
** Generated by: Abaqus/CAE 6.14-1
*Preprint, echo=NO, model=NO, history=NO, contact=NO
**
** PARTS
**
*Part, name=Part-1
*Node
      1,           0., 0.000500000024
      2,           0., 0.000449999992
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*Element, type=CAX4R
   1,    1,    2,   73,   72
   2,    2,    3,   74,   73
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*Nset, nset=Set-1, generate
    1,  1136,     1
*Elset, elset=Set-1, generate
    1,  1050,     1
** Section: Section-1
*Solid Section, elset=Set-1, material=Material-1
,
*End Part
**
**
** ASSEMBLY
**
*Assembly, name=Assembly
**
*Instance, name=Part-1-1, part=Part-1
*End Instance
**
*Nset, nset=Set-1, instance=Part-1-1, generate
   71,  1136,    71
*Elset, elset=Set-1, instance=Part-1-1, generate
   70,  1050,    70
*Nset, nset=Set-5, instance=Part-1-1, generate
   71,  1136,    71
*Elset, elset=Set-5, instance=Part-1-1, generate
   70,  1050,    70
*Nset, nset=WALLOUTSIDE0, instance=Part-1-1, generate
 1115,  1136,     1
*Nset, nset=WALLOUTSIDE1, instance=Part-1-1, generate
 1076,  1115,     1
*Nset, nset=WALLOUTSIDE2, instance=Part-1-1, generate
 1066,  1076,     1
*Elset, elset=_MOVINGSURFACE0_S3, internal, instance=Part-1-1, generate
 1030,  1050,     1
*Surface, type=ELEMENT, name=MOVINGSURFACE0
_MOVINGSURFACE0_S3, S3
*Elset, elset=_MOVINGSURFACE1_S3, internal, instance=Part-1-1, generate
  991,  1029,     1
*Surface, type=ELEMENT, name=MOVINGSURFACE1
_MOVINGSURFACE1_S3, S3
*Elset, elset=_MOVINGSURFACE2_S3, internal, instance=Part-1-1, generate
 981,  990,    1
*Surface, type=ELEMENT, name=MOVINGSURFACE2
_MOVINGSURFACE2_S3, S3
*Elset, elset=_Surf-1_S4, internal, instance=Part-1-1, generate
   1,  981,   70
*Surface, type=ELEMENT, name=Surf-1
_Surf-1_S4, S4
*Elset, elset=_Surf-5_S4, internal, instance=Part-1-1, generate
   1,  981,   70
*Surface, type=ELEMENT, name=Surf-5
_Surf-5_S4, S4
*End Assembly
**
** MATERIALS
**
*Material, name=Material-1
*Density
7800.,
*Elastic
 1.17e+11, 0.3
*Plastic
 1.25e+09,  0.
 1.28e+09, 0.1
 1.31e+09, 0.2
 1.37e+09, 0.4
 1.43e+09, 0.6
 1.49e+09, 0.8
 1.55e+09,  1.
 1.61e+09, 1.2
 1.67e+09, 1.4
 1.73e+09, 1.6
 1.79e+09, 1.8
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 4.25e+09, 10.
** ----------------------------------------------------------------
**
** STEP: Step-1
**
*Step, name=Step-1, nlgeom=NO, inc=1
*Static
0.000001,0.000001, 0.0000000001,0.000001
**
** BOUNDARY CONDITIONS
**
** Name: BC-1 Type: Displacement/Rotation
*Boundary
Set-5, 1, 1
Set-5, 2, 2
Set-5, 6, 6
**
** LOADS
**
** Name: DistributedPressure0   Type: Pressure
*Dsload, op=NEW
MOVINGSURFACE0, PNU, 1.
** Name: DistributedPressure1   Type: Pressure
*Dsload, op=NEW
MOVINGSURFACE1, PNU, 1.
** Name: DistributedPressure2   Type: Pressure
*Dsload, op=NEW
MOVINGSURFACE2, PNU, 1.
** Name: DistributedShear0   Type: Surface traction
*Dsload, op=NEW
MOVINGSURFACE0, TRVECNU, 1., 1., 0., 0.
** Name: DistributedShear1   Type: Surface traction
*Dsload, op=NEW
MOVINGSURFACE1, TRVECNU, 1., 1., 0., 0.
** Name: DistributedShear2   Type: Surface traction
*Dsload, op=NEW
MOVINGSURFACE2, TRVECNU, 1., 1., 0., 0.
** Name: Load-7   Type: Pressure
*Dsload, op=NEW
Surf-5, P, -3e+08
**
** OUTPUT REQUESTS
**
*Restart, write, frequency=0
**
** FIELD OUTPUT: F-Output-0
**
*Output, field, frequency=99999
*Node Output, nset=WALLOUTSIDE0
COORD, U
**
** FIELD OUTPUT: F-Output-1
**
*Node Output, nset=WALLOUTSIDE1
COORD, U
**
** FIELD OUTPUT: F-Output-2
**
*Node Output, nset=WALLOUTSIDE2
COORD, U
**
** FIELD OUTPUT: F-Output-4
**
*Output, field, variable=PRESELECT, frequency=99999
**
** HISTORY OUTPUT: H-Output-1
**
*Output, history, variable=PRESELECT, frequency=99999
*End Step
