*Heading
 tube2d
** Job name: case_tube2d Model name: Model-1
** Generated by: Abaqus/CAE 2021.HF3
*Preprint, echo=NO, model=NO, history=NO, contact=NO
**
** PARTS
**
*Part, name=PART-1
*Node
      1, 0.00499999989, -0.0250000004
      2, 0.00499999989, 0.0250000004
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*Element, type=CAX8RH
  1,   2,  53, 221, 215, 103, 417, 418, 220
  2,  53,  52, 225, 221, 102, 419, 420, 417
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*Nset, nset=NALL, generate
   1,  861,    1
*Nset, nset=BEAMINSIDEMOVING
   1,   2,   5,   6,   7,   8
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*Nset, nset=BEAMINSIDEFIXED
   1,   2,   3,   4, 203, 204
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*Nset, nset=BEAMINSIDEFREE
   3,   4, 104, 105, 106, 107
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*Elset, elset=EALL, generate
   1,  250,    1
*Elset, elset=BEAM, generate
   1,  250,    1
*Elset, elset=_PickedSet8, internal, generate
   1,  250,    1
** Section: TubeSection
*Solid Section, elset=_PickedSet8, material=Material
1.,
*End Part
**
**
** ASSEMBLY
**
*Assembly, name=Assembly
**
*Instance, name=PART-1-1, part=PART-1
*End Instance
**
*Elset, elset=BEAM, instance=PART-1-1, generate
   1,  250,    1
*Nset, nset=BEAMINSIDEFIXED, instance=PART-1-1
   1,   2,   3,   4, 203, 204
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*Nset, nset=BEAMINSIDEFREE, instance=PART-1-1
   3,   4, 104, 105, 106, 107
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*Nset, nset=BEAMINSIDEMOVING, instance=PART-1-1
   1,   2,   5,   6,   7,   8
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*Elset, elset=EALL, instance=PART-1-1, generate
   1,  250,    1
*Nset, nset=NALL, instance=PART-1-1, generate
   1,  861,    1
*Elset, elset=_BEAMINSIDEMOVING_S1, internal, instance=PART-1-1, generate
  1,  50,   1
*Surface, type=ELEMENT, name=BEAMINSIDEMOVING
_BEAMINSIDEMOVING_S1, S1
*End Assembly
**
** MATERIALS
**
*Material, name=Material
*Density
1200.,
*Elastic
300000., 0.3
** ----------------------------------------------------------------
**
** STEP: Step-1
**
*Step, name=Step-1, nlgeom=YES, inc=1
*Dynamic,application=QUASI-STATIC,direct,nohaf,initial=NO
0.001,0.001,
**
** BOUNDARY CONDITIONS
**
** Name: FixedEnds Type: Displacement/Rotation
*Boundary
BEAMINSIDEFIXED, 1, 1
BEAMINSIDEFIXED, 2, 2
**
** LOADS
**
** Name: DistributedPressure   Type: Pressure
*Dsload, op=NEW
BEAMINSIDEMOVING, PNU, 1.
** Name: DistributedShear   Type: Surface traction
*Dsload, op=NEW
BEAMINSIDEMOVING, TRVECNU, 1., 1., 0., 0.
**
** OUTPUT REQUESTS
**
*Restart, write, overlay, frequency=99999
**
** FIELD OUTPUT: F-Output-1
**
*Output, field, frequency=99999
*Node Output, nset=BEAMINSIDEMOVING
COORD, U
**
** FIELD OUTPUT: F-Output-2
**
*Output, field, variable=PRESELECT, frequency=99999
**
** HISTORY OUTPUT: H-Output-1
**
*Output, history, variable=PRESELECT, frequency=99999
*End Step
