*Heading
** Job name: Yarn Model name: Yarn
** Generated by: Abaqus/CAE 6.14-1
*Preprint, echo=NO, model=NO, history=NO, contact=NO
**
** PARTS
**
*Part, name=PART-YARN
*INCLUDE, INPUT=nodes_elements.txt
*Elset, elset=YARN, generate
	1,	11,	1
*Nset, nset=START_NODE
	1,
*Nset, nset=END_NODE
	12,
*Nset, nset=CL_NODES, generate
	1,	23,	1
** Section: Section-YARN Profile: Profile-yarn
*Beam General Section, elset=YARN, poisson = 0.39, density=1140., section=CIRC
0.00036
0.,1.,0.
2.5e+09, 8.99281e+08, 0.
*End Part
**
**
** ASSEMBLY
**
*Assembly, name=ASSEMBLY-YARN
**
*Instance, name=INSTANCE-YARN, part=PART-YARN
*End Instance
**
*Nset, nset=YARN, instance=INSTANCE-YARN, generate
	1,	23,	1
*Nset, nset=START_NODE, instance=INSTANCE-YARN
	1,
*Nset, nset=END_NODE, instance=INSTANCE-YARN
	12,
*Elset, elset=YARN, instance=INSTANCE-YARN, generate
	1,	11,	1
*Surface, type=ELEMENT, name=YARN
 YARN,
**
*End Assembly
** ----------------------------------------------------------------
**
** STEP: Step-1
**
*Step, name=Step-1, nlgeom=YES, inc=1
*Dynamic,application=QUASI-STATIC,direct,nohaf,initial=NO
0.001,0.001,
**
** BOUNDARY CONDITIONS
**
** Name: BC-1 Type: Displacement/Rotation
*Boundary
INSTANCE-YARN.START_NODE, 1, 1
** BOUNDARY CONDITIONS
**
** Name: BC-2 Type: Displacement/Rotation
*Boundary
INSTANCE-YARN.START_NODE, 2, 2
** BOUNDARY CONDITIONS
**
** Name: BC-3 Type: Displacement/Rotation
*Boundary
INSTANCE-YARN.START_NODE, 3, 3
** BOUNDARY CONDITIONS
**
** Name: BC-4 Type: Displacement/Rotation
*Boundary
INSTANCE-YARN.START_NODE, 4, 4
** BOUNDARY CONDITIONS
**
** Name: BC-5 Type: Displacement/Rotation
*Boundary
INSTANCE-YARN.START_NODE, 5, 5
** BOUNDARY CONDITIONS
**
** Name: BC-6 Type: Displacement/Rotation
*Boundary
INSTANCE-YARN.START_NODE, 6, 6
** Name: BC-7 Type: Displacement/Rotation
*Boundary
INSTANCE-YARN.END_NODE, 1, 1
** Name: BC-8 Type: Displacement/Rotation
*Boundary
INSTANCE-YARN.END_NODE, 2, 2
** Name: BC-9 Type: Displacement/Rotation
*Boundary
INSTANCE-YARN.END_NODE, 3, 3
** Name: BC-10 Type: Displacement/Rotation
*Boundary
INSTANCE-YARN.END_NODE, 4, 4
** Name: BC-11 Type: Displacement/Rotation
*Boundary
INSTANCE-YARN.END_NODE, 5, 5
** Name: BC-12 Type: Displacement/Rotation
*Boundary
INSTANCE-YARN.END_NODE, 6, 6
**
** LOADS
**
** Name: LINELOAD-1	 Type: Line load
*Dload, op=NEW
YARN, PXNU, 1.
** Name: LINELOAD-2	 Type: Line load
*Dload, op=NEW
YARN, PYNU, 1.
** Name: LINELOAD-3	 Type: Line load
*Dload, op=NEW
YARN, PZNU, 1.
**
** OUTPUT REQUESTS
**
*Restart, write, overlay, frequency=99999
**
** FIELD OUTPUT: F-Output-2
**
*Output, field, frequency=99999
*Node Output, nset=YARN
COORD, U
**
** FIELD OUTPUT: F-Output-1
**
*Output, field, variable=PRESELECT, frequency=99999
**
** HISTORY OUTPUT: H-Output-1
**
*Output, history, variable=PRESELECT, frequency=99999
*End Step
